<?xml version='1.0' encoding='UTF-8'?>
<Lems>

  <!-- axoaxonic cell -->

    <Target component="sim1"/>

    <Include file="Cells.xml"/>
    <Include file="Networks.xml"/>
    <Include file="Simulation.xml"/>

    <Include file="granule.net.nml"/>
    <Include file="granule.cell.nml"/>

    <Include file="channels/Na.channel.nml"/>
    <Include file="channels/Kdrfast.channel.nml"/>
    <Include file="channels/leak_chan.channel.nml"/>

<!-- Simulation specifications -->

    <Simulation id="sim1" length="300ms" step="0.001ms" target="network">

        <Display id="d1" title="granule cell with 0.1nA input" timeScale="1ms" xmin="-10" xmax="310" ymin="-85" ymax="55">
            <Line id="granule V(mV)" quantity="Pop_granulecell/0/granulecell/v" scale="1mV" color="#0000FF" timeScale="1ms"/>
        </Display>

        <OutputFile id="of0" fileName="granulecell.dat">
            <OutputColumn id="v" quantity="Pop_granulecell/0/granulecell/v"/>
        </OutputFile>

    </Simulation>

</Lems>
