<?xml version="1.0" encoding="UTF-8"?>
<neuroml xmlns="http://www.neuroml.org/schema/neuroml2"
    xmlns:xsi="http://www.w3.org/2001/XMLSchema-instance"
    xsi:schemaLocation="http://www.neuroml.org/schema/neuroml2 https://raw.github.com/NeuroML/NeuroML2/development/Schemas/NeuroML2/NeuroML_v2beta4.xsd"
    id = "NeuroML2_file_exported_from_NEURON">

    <include href="/channels/Na.channel.nml"/>
    <include href="/channels/Kdrfast.channel.nml"/>
    <!-- <include href="/channels/Kdrfast.channel.nml"/> -it's not used -->
    <include href="/channels/leak_chan.channel.nml"/>

  <cell id="granulecell">
    <notes>Cell: granulecell exported from NEURON ModelView</notes>
    <morphology id="morphology">
<!-- Section: granulecell[0].soma[0] (segmentGroup: soma_0) which has 12 3D points, so 11 segment(s)-->
      <segment id="0" name = "Seg0_soma_0">
        <proximal x="-3.337" y="0" z="0" diameter="7.82"/>
        <distal x="-2.712" y="0" z="0" diameter="7.82"/>
      </segment>
      <segment id="2" name = "Seg1_soma_0">
        <parent segment="0"/>
        <distal x="-2.087" y="-0.2" z="0" diameter="7.82"/>
      </segment>
      <segment id="3" name = "Seg2_soma_0">
        <parent segment="2"/>
        <distal x="-1.875" y="-0.2" z="0" diameter="7.16"/>
      </segment>
      <segment id="4" name = "Seg3_soma_0">
        <parent segment="3"/>
        <distal x="-0.837" y="-0.412" z="0" diameter="6.5"/>
      </segment>
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
<!-- Section: granulecell[0].soma[0] (segmentGroup: soma_0) which has 12 3D points, so 11 segment(s)-->

      <segmentGroup id = "soma_0"  neuroLexId="sao864921383">
         <notes>This group contains an unbranched set of segments, and all of the segmentGroups marked with
             neuroLexId = sao864921383 form a non-overlapping set of all of the segments.
             These segmentGroups correspond to the 'cables' of NeuroML v1.8.1, and map to/from NEURON sections.</notes>
        <member segment = "0"/>
        <member segment = "2"/>
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      </segmentGroup>

<!-- Section: granulecell[0].soma[1] (segmentGroup: soma_1) which has 2 3D points, so 1 segment(s)-->

      <segmentGroup id = "soma_1"  neuroLexId="sao864921383">
         <notes>This group contains an unbranched set of segments, and all of the segmentGroups marked with
             neuroLexId = sao864921383 form a non-overlapping set of all of the segments.
             These segmentGroups correspond to the 'cables' of NeuroML v1.8.1, and map to/from NEURON sections.</notes>
        <member segment = "12"/>
      </segmentGroup>

<!-- Section: granulecell[0].dend[0] (segmentGroup: dend_0) which has 8 3D points, so 7 segment(s)-->

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
      <segmentGroup id="all"> <!-- Replacing subset name ModelViewParmSubset_0 with all, as it contains all sections -->
        <include segmentGroup = "soma_0"/>
        <include segmentGroup = "soma_1"/>
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      </segmentGroup>

      <segmentGroup id="soma_group">
        <include segmentGroup = "soma_0"/>
        <include segmentGroup = "soma_1"/>
        <include segmentGroup = "soma_2"/>
        <include segmentGroup = "soma_3"/>
      </segmentGroup>

      <segmentGroup id="dendrite_group">
        <include segmentGroup = "dend_0"/>
        <include segmentGroup = "dend_1"/>
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      </segmentGroup>

      <segmentGroup id="axon_group">
        <include segmentGroup = "axon"/>
      </segmentGroup>

    </morphology>

    <!-- Biophysical properties -->
    <biophysicalProperties id="biophys">

      <membraneProperties>

        <channelDensity id="leak_all" ionChannel="leak_chan" condDensity="0.166667mS_per_cm2" segmentGroup="all" erev="-74mV" ion="non_specific"/>
        <channelDensity id="Na_soma_group" ionChannel="Na" condDensity="200mS_per_cm2" segment_group="soma_group" erev="55mV" ion="na"/>
        <channelDensity id="Na_dendrite_group" ionChannel="Na" condDensity="66.6667mS_per_cm2" segment_group="dendrite_group" erev="55mV" ion="na"/>
        <channelDensity id="Na_axon_group" ionChannel="Na" condDensity="200mS_per_cm2" segment_group="axon_group" erev="55mV" ion="na"/>
        <channelDensity id="Kdrfast_all" ionChannel="Kdrfast" condDensity="60mS_per_cm2" segment_group="all" erev="-90mV" ion="k"/>

        <spikeThresh value="0 mV"/>
        <specificCapacitance value="2.5 uF_per_cm2" />
        <initMembPotential value="-74.0 mV"/>

      </membraneProperties>

      <intracellularProperties>
        <resistivity value="0.2 kohm_cm"  segmentGroup="soma_group"/>
        <resistivity value="0.2 kohm_cm"  segmentGroup="dendrite_group"/>
        <resistivity value="0.05 kohm_cm"  segmentGroup="axon_group"/>
      </intracellularProperties>

    </biophysicalProperties>

  </cell>

</neuroml>
